ORIGIN := 1
COOR(A1, B1, C1, A2, B2, C2) :=
    [x; y] ← [(C1 - C2)/(A2 - A1); (A2*C1 - A1*C2)/(A2 - A1)]
    [x; y]
circle_+(x, r, xc, yc) := sqrt(r^2 - (x - xc)^2) + yc
LINE_ABC(x1, y1, x2, y2) :=
    [A; B; C] ← [(y2 - y1)/(x2 - x1); -1; (x2*y1 - x1*y2)/(x2 - x1)]
    [A; B; C]
x := 0, 1/1000 .. 1
av(N_r) := ceil(N_r/2)
circle_-(x, r, xc, yc) := -sqrt(r^2 - (x - xc)^2) + yc
Mx_ПереносПоворот(x, y, xc, yc, α) := (x - xc)*cos(α) + (y - yc)*sin(α)
My_ПереносПоворот(x, y, xc, yc, α) := -(x - xc)*sin(α) + (y - yc)*cos(α)
AIRFOIL_xf(x, line, x_f, r̅_вх, r̅_вых, γ̅, γ_вх, γ_вых, ε) :=
    k1 ← 1/(2*x_f/(x_f - 1)*tan(ε))*{
        (x_f/(x_f - 1) - 1) - sqrt((x_f/(x_f - 1) - 1)^2 - 4*(x_f/(x_f - 1)*tan(ε)^2)) if tan(ε)*ε > 0
        (x_f/(x_f - 1) - 1) + sqrt((x_f/(x_f - 1) - 1)^2 - 4*(x_f/(x_f - 1)*tan(ε)^2)) otherwise
    }
    k2 ← 1/(2*tan(ε))*{
        (x_f/(x_f - 1) - 1) - sqrt((x_f/(x_f - 1) - 1)^2 - 4*(x_f/(x_f - 1)*tan(ε)^2)) if tan(ε)*ε > 0
        (x_f/(x_f - 1) - 1) + sqrt((x_f/(x_f - 1) - 1)^2 - 4*(x_f/(x_f - 1)*tan(ε)^2)) otherwise
    }
    [γ_сп.вх; γ_сп.вых] ←
        (1 - γ̅)*[γ_вх; γ_вых] if (ε > 0)
        γ̅*[γ_вх; γ_вых] otherwise
    [γ_кор.вх; γ_кор.вых] ←
        γ̅*[γ_вх; γ_вых] if (ε > 0)
        (1 - γ̅)*[γ_вх; γ_вых] otherwise
    [x_o.вх, x_o.вых; y_o.вх, y_o.вых] ← [r̅_вх, (1 - r̅_вых); k1*r̅_вх, -k2*r̅_вых]
    [x_cl+; y_cl+] ← COOR(tan(atan(k1) + γ_сп.вх), (-1), (sqrt(tan(atan(k1) + γ_сп.вх)^2 + 1)*r̅_вх) + (-tan(atan(k1) + γ_сп.вх)*x_o.вх - (-1)*y_o.вх), tan(atan(k2) - γ_сп.вых), (-1), (sqrt(tan(atan(k2) - γ_сп.вых)^2 + 1)*r̅_вых) + (-tan(atan(k2) - γ_сп.вых)*x_o.вых - (-1)*y_o.вых))
    [x_cl-; y_cl-] ← COOR(tan(atan(k1) - γ_кор.вх), (-1), (-sqrt(tan(atan(k1) - γ_кор.вх)^2 + 1)*r̅_вх) + (-tan(atan(k1) - γ_кор.вх)*x_o.вх - (-1)*y_o.вх), tan(atan(k2) + γ_кор.вых), (-1), (-sqrt(tan(atan(k2) + γ_кор.вых)^2 + 1)*r̅_вых) + (-tan(atan(k2) + γ_кор.вых)*x_o.вых - (-1)*y_o.вых))
    [x_вх.clc+; y_вх.clc+] ← COOR(tan(atan(k1) + γ_сп.вх), (-1), (sqrt(tan(atan(k1) + γ_сп.вх)^2 + 1)*r̅_вх) + (-tan(atan(k1) + γ_сп.вх)*x_o.вх - (-1)*y_o.вх), -1/tan(atan(k1) + γ_сп.вх), (-1), -(-1/tan(atan(k1) + γ_сп.вх))*x_o.вх - (-1)*y_o.вх)
    [x_вх.clc-; y_вх.clc-] ← COOR(tan(atan(k1) - γ_кор.вх), (-1), (-sqrt(tan(atan(k1) - γ_кор.вх)^2 + 1)*r̅_вх) + (-tan(atan(k1) - γ_кор.вх)*x_o.вх - (-1)*y_o.вх), -1/tan(atan(k1) - γ_кор.вх), (-1), -(-1/tan(atan(k1) - γ_кор.вх))*x_o.вх - (-1)*y_o.вх)
    [x_вых.clc+; y_вых.clc+] ← COOR(tan(atan(k2) - γ_сп.вых), (-1), (sqrt(tan(atan(k2) - γ_сп.вых)^2 + 1)*r̅_вых) + (-tan(atan(k2) - γ_сп.вых)*x_o.вых - (-1)*y_o.вых), -1/tan(atan(k2) - γ_сп.вых), (-1), -(-1/tan(atan(k2) - γ_сп.вых))*x_o.вых - (-1)*y_o.вых)
    [x_вых.clc-; y_вых.clc-] ← COOR(tan(atan(k2) + γ_кор.вых), (-1), (-sqrt(tan(atan(k2) + γ_кор.вых)^2 + 1)*r̅_вых) + (-tan(atan(k2) + γ_кор.вых)*x_o.вых - (-1)*y_o.вых), -1/tan(atan(k2) + γ_кор.вых), (-1), -(-1/tan(atan(k2) + γ_кор.вых))*x_o.вых - (-1)*y_o.вых)
    for j ∈ 1 .. N_dis
        x_dis.сп.вх[j] ← x_вх.clc+ + (x_cl+ - x_вх.clc+)/N_dis*j
        y_dis.сп.вх[j] ← tan(atan(k1) + γ_сп.вх)*x_dis.сп.вх[j] + sqrt(tan(atan(k1) + γ_сп.вх)^2 + 1)*r̅_вх + (-tan(atan(k1) + γ_сп.вх)*x_o.вх) + (-(-1)*y_o.вх)
        x_dis.сп.вых[j] ← x_cl+ + (x_вых.clc+ - x_cl+)/N_dis*j
        y_dis.сп.вых[j] ← tan(atan(k2) - γ_сп.вых)*x_dis.сп.вых[j] + sqrt(tan(atan(k2) - γ_сп.вых)^2 + 1)*r̅_вых + (-tan(atan(k2) - γ_сп.вых)*x_o.вых) + (-(-1)*y_o.вых)
        x_dis.кор.вх[j] ← x_вх.clc- + (x_cl- - x_вх.clc-)/N_dis*j
        y_dis.кор.вх[j] ← tan(atan(k1) - γ_кор.вх)*x_dis.кор.вх[j] + (-sqrt(tan(atan(k1) - γ_кор.вх)^2 + 1)*r̅_вх) + (-tan(atan(k1) - γ_кор.вх)*x_o.вх) + (-(-1)*y_o.вх)
        x_dis.кор.вых[j] ← x_cl- + (x_вых.clc- - x_cl-)/N_dis*j
        y_dis.кор.вых[j] ← tan(atan(k2) + γ_кор.вых)*x_dis.кор.вых[j] + (-sqrt(tan(atan(k2) + γ_кор.вых)^2 + 1)*r̅_вых) + (-tan(atan(k2) + γ_кор.вых)*x_o.вых) + (-(-1)*y_o.вых)
    for j ∈ 1 .. N_dis
        [A_сп[j]; B_сп[j]; C_сп[j]] ← LINE_ABC(x_dis.сп.вх[j], y_dis.сп.вх[j], x_dis.сп.вых[j], y_dis.сп.вых[j])
        [A_кор[j]; B_кор[j]; C_кор[j]] ← LINE_ABC(x_dis.кор.вх[j], y_dis.кор.вх[j], x_dis.кор.вых[j], y_dis.кор.вых[j])
    for j ∈ 1 .. N_dis - 1
        [x_dis.сп.cl[j]; y_dis.сп.cl[j]] ← COOR(A_сп[j], B_сп[j], C_сп[j], A_сп[j + 1], B_сп[j + 1], C_сп[j + 1])
        [x_dis.кор.cl[j]; y_dis.кор.cl[j]] ← COOR(A_кор[j], B_кор[j], C_кор[j], A_кор[j + 1], B_кор[j + 1], C_кор[j + 1])
    for j ∈ 1 .. N_dis
        x_circle.вх+[j] ← 0 + (x_вх.clc+ - 0)/N_dis*(j - 1)
        y_circle.вх+[j] ← circle_+(x_circle.вх+[j], r̅_вх, x_o.вх, y_o.вх)
        x_circle.вх-[j] ← 0 + (x_вх.clc- - 0)/N_dis*(j - 1)
        y_circle.вх-[j] ← circle_-(x_circle.вх-[j], r̅_вх, x_o.вх, y_o.вх)
    for j ∈ 1 .. N_dis
        [x_сп.temp[j]; y_сп.temp[j]] ← 1/2*{
            [x_dis.сп.вх[j] + x_dis.сп.cl[j]; y_dis.сп.вх[j] + y_dis.сп.cl[j]] if j == 1
            [x_dis.сп.cl[j - 1] + x_dis.сп.вых[j]; y_dis.сп.cl[j - 1] + y_dis.сп.вых[j]] if j == N_dis
            [x_dis.сп.cl[j - 1] + x_dis.сп.cl[j]; y_dis.сп.cl[j - 1] + y_dis.сп.cl[j]] otherwise
        }
        [x_кор.temp[j]; y_кор.temp[j]] ← 1/2*{
            [x_dis.кор.вх[j] + x_dis.кор.cl[j]; y_dis.кор.вх[j] + y_dis.кор.cl[j]] if j == 1
            [x_dis.кор.cl[j - 1] + x_dis.кор.вых[j]; y_dis.кор.cl[j - 1] + y_dis.кор.вых[j]] if j == N_dis
            [x_dis.кор.cl[j - 1] + x_dis.кор.cl[j]; y_dis.кор.cl[j - 1] + y_dis.кор.cl[j]] otherwise
        }
    for j ∈ 1 .. N_dis
        x_circle.вых+[j] ← x_вых.clc+ + (1 - x_вых.clc+)/N_dis*(j - 1)
        y_circle.вых+[j] ← circle_+(x_circle.вых+[j], r̅_вых, x_o.вых, y_o.вых)
        x_circle.вых-[j] ← x_вых.clc- + (1 - x_вых.clc-)/N_dis*(j - 1)
        y_circle.вых-[j] ← circle_-(x_circle.вых-[j], r̅_вых, x_o.вых, y_o.вых)
    [x_сп.temp; y_сп.temp] ← [stack(x_circle.вх+, x_сп.temp, x_circle.вых+); stack(y_circle.вх+, y_сп.temp, y_circle.вых+)]
    [x_кор.temp; y_кор.temp] ← [stack(x_circle.вх-, x_кор.temp, x_circle.вых-); stack(y_circle.вх-, y_кор.temp, y_circle.вых-)]
    AIRFOIL ←
        interp(lspline(x_сп.temp, y_сп.temp), x_сп.temp, y_сп.temp, x) if line == "+"
        interp(lspline((x_сп.temp + x_кор.temp)/2, (y_сп.temp + y_кор.temp)/2), (x_сп.temp + x_кор.temp)/2, (y_сп.temp + y_кор.temp)/2, x) if line == "0" and (x_o.вх ≤ x ≤ x_o.вых)
        interp(lspline(x_кор.temp, y_кор.temp), x_кор.temp, y_кор.temp, x) if line == "-"
        k1*x if (line == "вх") and (0 ≤ x ≤ x_f)
        k2*x - k2 if (line == "вых") and (x_f ≤ x ≤ 1)
        tan(atan(k1) + γ_сп.вх)*x + sqrt(tan(atan(k1) + γ_сп.вх)^2 + 1)*r̅_вх - tan(atan(k1) + γ_сп.вх)*x_o.вх - (-1)*y_o.вх if (line == "вх+") and (x_вх.clc+ ≤ x ≤ x_cl+)
        tan(atan(k1) - γ_кор.вх)*x + (-sqrt(tan(atan(k1) - γ_кор.вх)^2 + 1)*r̅_вх - tan(atan(k1) - γ_кор.вх)*x_o.вх - (-1)*y_o.вх) if (line == "вх-") and (x_вх.clc- ≤ x ≤ x_cl-)
        tan(atan(k2) - γ_сп.вых)*x + sqrt(tan(atan(k2) - γ_сп.вых)^2 + 1)*r̅_вых - tan(atan(k2) - γ_сп.вых)*x_o.вых - (-1)*y_o.вых if (line == "вых+") and (x_cl+ ≤ x ≤ x_вых.clc+)
        tan(atan(k2) + γ_кор.вых)*x + (-sqrt(tan(atan(k2) + γ_кор.вых)^2 + 1)*r̅_вых - tan(atan(k2) + γ_кор.вых)*x_o.вых - (-1)*y_o.вых) if (line == "вых-") and (x_cl- ≤ x ≤ x_вых.clc-)
        NaN otherwise
N_dis ≡ 8
γ := 105*deg
[r̅_вх; r̅_вых] := [0.05; 0.03]
[γ_вх; γ_вых] := [20; 4]*°
t̅ := 1
x_f := 0.4
ε := 130*deg
γ̅ := 0.5
BezierValue(d1, d2, t) := d1 + (d2 - d1)*t
square :=
    0.25 if ε > 0
    -0.25 otherwise
    = 0.25
BezierCurrve(xp, yp, N) :=
    for i ∈ 1 .. N - 1
        xt ← xp
        yt ← yp
        while 1 > 0
            if rows(xt) == 3
                x1 ← BezierValue(xt[1], xt[2], i/(N - 1))
                y1 ← BezierValue(yt[1], yt[2], i/(N - 1))
                x2 ← BezierValue(xt[2], xt[3], i/(N - 1))
                y2 ← BezierValue(yt[2], yt[3], i/(N - 1))
                xL ← stack(xL, BezierValue(x1, x2, i/(N - 1)))
                yL ← stack(yL, BezierValue(y1, y2, i/(N - 1)))
                break
    [xL, yL]
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xp := [0; 0.5; 1]
yp := [0; 0.4; 0]
[xL, yL]
BezierCurrve(xp, yp, 10) = [[0; 0.111111; 0.222222; 0.333333; 0.444444; 0.555556; 0.666667; 0.777778; 0.888889; 1], [0; 0.0790123; 0.138272; 0.177778; 0.197531; 0.197531; 0.177778; 0.138272; 0.0790123; 0]]
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[xc, c; xf, f] :=
    x_temp ← r̅_вх
    xc ← r̅_вх
    c ← r̅_вх
    xf ← x_f
    f ← AIRFOIL_xf(x_temp, "0", x_f, r̅_вх, r̅_вых, γ̅, γ_вх, γ_вых, ε)
    while x_temp ≤ 1 - r̅_вых
        x_temp ← x_temp + 1/1000
        if (AIRFOIL_xf(x_temp, "+", x_f, r̅_вх, r̅_вых, γ̅, γ_вх, γ_вых, ε) + AIRFOIL_xf(x_temp, "-", x_f, r̅_вх, r̅_вых, γ̅, γ_вх, γ_вых, ε))/2 ≥ c
            xc ← x_temp
            c ← (AIRFOIL_xf(x_temp, "+", x_f, r̅_вх, r̅_вых, γ̅, γ_вх, γ_вых, ε) + AIRFOIL_xf(x_temp, "-", x_f, r̅_вх, r̅_вых, γ̅, γ_вх, γ_вых, ε))/2
        if AIRFOIL_xf(x_temp, "0", x_f, r̅_вх, r̅_вых, γ̅, γ_вх, γ_вых, ε) ≥ f
            xf ← x_f
            f ← AIRFOIL_xf(x_temp, "0", x_f, r̅_вх, r̅_вых, γ̅, γ_вх, γ_вых, ε)
    [xc, c; xf, f]
    = [0.437, 0.119604; 0.4, 0.121375]
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[xo; t; yo] :=
    for i ∈ 1 .. N_dis
        t[i] ← ∞
        xi ← r̅_вх + ((1 - r̅_вых) - r̅_вх)/(N_dis - 1)*(i - 1)
        for j ∈ 1 .. N_dis
            xj ← r̅_вх + ((1 - r̅_вых) - r̅_вх)/(N_dis - 1)*(j - 1)
            t_temp ← sqrt((Mx_ПереносПоворот(xi, AIRFOIL_xf(xi, "-", x_f, r̅_вх, r̅_вых, γ̅, γ_вх, γ_вых, ε), 0, 0, γ) + t̅ - Mx_ПереносПоворот(xj, AIRFOIL_xf(xj, "+", x_f, r̅_вх, r̅_вых, γ̅, γ_вх, γ_вых, ε), 0, 0, γ))^2 + (My_ПереносПоворот(xi, AIRFOIL_xf(xi, "-", x_f, r̅_вх, r̅_вых, γ̅, γ_вх, γ_вых, ε), 0, 0, γ) + (-My_ПереносПоворот(xj, AIRFOIL_xf(xj, "+", x_f, r̅_вх, r̅_вых, γ̅, γ_вх, γ_вых, ε), 0, 0, γ)))^2)
            if t[i] > t_temp
                xo[i] ← 0.5*(Mx_ПереносПоворот(xi, AIRFOIL_xf(xi, "-", x_f, r̅_вх, r̅_вых, γ̅, γ_вх, γ_вых, ε), 0, 0, γ) + t̅/2 + Mx_ПереносПоворот(xj, AIRFOIL_xf(xj, "+", x_f, r̅_вх, r̅_вых, γ̅, γ_вх, γ_вых, ε), 0, 0, γ) - t̅/2)
                yo[i] ← 0.5*(My_ПереносПоворот(xi, AIRFOIL_xf(xi, "-", x_f, r̅_вх, r̅_вых, γ̅, γ_вх, γ_вых, ε), 0, 0, γ) + My_ПереносПоворот(xj, AIRFOIL_xf(xj, "+", x_f, r̅_вх, r̅_вых, γ̅, γ_вх, γ_вых, ε), 0, 0, γ))
                t[i] ← t_temp
    [xo; t; yo]
transpose(t) = [0.88059, 0.867125, 0.863832, 0.851845, 0.842411, 0.828311, 0.813542, 0.793509]
transpose(augment(xo, yo)) = [
    0.0342331, 0.0356751, 0.0316054, 0.0169322, -1.04697e-5, -0.0396494, -0.0692708, -0.129224;
    -0.128969, -0.197388, -0.26433, -0.396463, -0.459956, -0.585399, -0.645495, -0.765495
]
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r(x) :=
    temp[ORIGIN] ← r̅_вх
    for i ∈ 2 .. N_dis
        temp[i] ← temp[i - 1] + sqrt((xo[i - 1] - xo[i])^2 + (yo[i - 1] - yo[i])^2)
    r ←
        interp(lspline(temp, t), temp, t, x) if (r̅_вх ≤ x ≤ 1 - r̅_вых)
        NaN otherwise
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